// COMSOL Multiphysics 5.5.0.359 model "A.mph"
// Outline of the model tree

Parameters
  R = 2.5[mm]
  l = 1.05[mm]
  w = 1 [mm]
  size = size_orig - 2*cut
  p0 = 0[Pa]
  rhos = 137.7[kg/m^3]
  c0 = 230.9[m/s]
  D = 500[nm]
  cut = 0.05[mm]
  size_orig = 7[mm]

Geometry
  geom1 "Geometry 1" (3D, length unit m)
    cyl1: Cylinder | r = 2.5[mm]; h = D
    blk1: Block | pos = {0, 0, D/2}; base = center; size = {w, size, D}
    uni1: Union | input = blk1, cyl1; intbnd = off; face = all
    blk2: Block | pos = {0, 0, D/2}; base = center; size = {7[mm], size, 1[mm]}
    copy1: Copy | input = uni1; keep = on; displx = 0; disply = 0; displz = 0
    dif1: Difference | input = blk2; input2 = copy1
    fin: Finalize "Form Union"

Materials
  mat1: Common "Helium [liquid]" on domains 2
    def "Basic"
      thermalconductivity = k_liquid_1(T[1/K])[W/(m*K)]
      thermalexpansioncoefficient = (alpha_liquid_2(T[1/K])[1/K]+(Tempref-3[K])*if(abs(T-Tempref)>1e-3,(alpha_liquid_2(T[1/K])[1/K]-alpha_liquid_2(Tempref[1/K])[1/K])/(T-Tempref),d(alpha_liquid_2(T[1/K])[1/K],T)))/(1+alpha_liquid_2(Tempref[1/K])[1/K]*(Tempref-3[K]))
      VP = VP(T[1/K])[Pa]
      density = 145
      soundspeed = 236
      k_liquid_1: Piecewise | arg = T; pieces = {2.5, 5.0, 0.04003492-0.01704312*T^1+0.003395238*T^2+2.962963E-5*T^3}
      alpha_liquid_2: Piecewise
        arg = T
        pieces = 
          {2.2, 4.63, 0.05741533-0.06691296*T^1+0.03834158*T^2-0.00912708*T^3+8.210301E-4*T^4}
          {4.63, 5.2, 372.4051-312.9611*T^1+98.62651*T^2-13.81394*T^3+0.7256635*T^4}
      VP: Piecewise | arg = T; pieces = {2.2, 5.1, (exp((-1.42910000e+00/T+3.08860000e+00*log10(T)+1.30226000e+00-1.18378000e+00/T^3)*log(10.0)))*1.33320000e+02}
      rho_liquid_2: Piecewise
        arg = T
        pieces = 
          {2.2, 4.7, 74.65559+104.7585*T^1-52.62056*T^2+11.05411*T^3-0.8977896*T^4}
          {4.7, 5.2, -162569.0+136875.8*T^1-43179.75*T^2+6054.824*T^3-318.5092*T^4}
    ThermalExpansion
      dL = (dL_liquid_2(T[1/K])-dL_liquid_2(Tempref[1/K]))/(1+dL_liquid_2(Tempref[1/K]))
      dLIso = (dL_liquid_2(T[1/K])-dL_liquid_2(Tempref[1/K]))/(1+dL_liquid_2(Tempref[1/K]))
      dL_liquid_2: Piecewise
        arg = T
        pieces = 
          {2.2, 4.78, 0.27874143-0.4045158*T^1+0.1999072*T^2-0.04226672*T^3+0.00341781*T^4}
          {4.78, 5.2, 860.6945-723.5078*T^1+228.0613*T^2-31.95169*T^3+1.679023*T^4}
  mat2: Common "SiO2 (fused quartz) [solid,average]" on domains 1
    def "Basic"
      thermalconductivity = k_solid_1(T[1/K])[W/(m*K)]
      resistivity = res_solid_1(T[1/K])[ohm*m]
      thermalexpansioncoefficient = (alpha_solid_average_6(T[1/K])[1/K]+(Tempref-293[K])*if(abs(T-Tempref)>1e-3,(alpha_solid_average_6(T[1/K])[1/K]-alpha_solid_average_6(Tempref[1/K])[1/K])/(T-Tempref),d(alpha_solid_average_6(T[1/K])[1/K],T)))/(1+alpha_solid_average_6(Tempref[1/K])[1/K]*(Tempref-293[K]))
      heatcapacity = C_solid_1(T[1/K])[J/(kg*K)]
      electricconductivity = sigma_solid_1(T[1/K])[S/m]
      HC = HC_solid_1(T[1/K])[J/(mol*K)]
      emissivity = epsilon(T[1/K])
      density = 2650
      TD = TD(T[1/K])[m^2/s]
      soundspeed = 5700
      k_solid_1: Piecewise
        arg = T
        pieces = 
          {5.0, 280.0, 0.09229359+0.003299521*T^1+4.343238E-5*T^2-2.258807E-7*T^3+3.049078E-10*T^4}
          {280.0, 1400.0, -0.9854696+0.01820907*T^1-5.290512E-5*T^2+7.552525E-8*T^3-5.008123E-11*T^4+1.311324E-14*T^5}
          {1400.0, 1473.0, -1798.509+4.192721*T^1-0.003251176*T^2+8.408144E-7*T^3}
      res_solid_1: Piecewise | arg = T; pieces = {293.0, 823.0, exp(2.719273E-10*T^4 - 7.491946E-07*T^3 + 8.035453E-04*T^2 - 4.185428E-01*T + 1.025761E+02)}
      alpha_solid_average_6: Piecewise | arg = T; pieces = {80.0, 1000.0, -2.964104E-7+4.486769E-9*T^1-8.553927E-12*T^2+7.361755E-15*T^3-2.477538E-18*T^4}
      C_solid_1: Piecewise
        arg = T
        pieces = 
          {20.0, 115.0, -41.6561969+3.44978917*T^1-0.00268178752*T^2}
          {115.0, 925.0, 61.4940471+1.92679392*T^1+0.00446362927*T^2-1.70427123E-5*T^3+1.88108958E-8*T^4-7.06246648E-12*T^5}
          {925.0, 2000.0, 890.241395+0.370745914*T^1-1.10760354E-4*T^2+3.1394372E-8*T^3}
      sigma_solid_1: Piecewise | arg = T; pieces = {293.0, 823.0, 1/(exp(2.719273E-10*T^4-7.491946E-07*T^3+8.035453E-04*T^2-4.185428E-01*T+1.025761E+02))}
      HC_solid_1: Piecewise
        arg = T
        pieces = 
          {20.0, 115.0, -2.19531886+0.20355888*T^1-1.77835941E-4*T^2}
          {115.0, 925.0, 3.39474447+0.115412837*T^1+2.69721434E-4*T^2-1.02702807E-6*T^3+1.13306276E-9*T^4-4.25343766E-13*T^5}
          {925.0, 2000.0, 53.4638633+0.0216572752*T^1-6.25110938E-6*T^2+1.80014466E-9*T^3}
      epsilon: Piecewise | arg = T; pieces = {75.0, 312.0, 0.7243795+5.530512E-5*T^1}
      rho: Piecewise | arg = T; pieces = {80.0, 1000.0, 2219.39+0.01105999*T^1-4.708012E-5*T^2+6.980692E-8*T^3-4.995273E-11*T^4+1.430874E-14*T^5}
      TD: Piecewise | arg = T; pieces = {82.0, 1039.0, 1.559138E-6-4.991949E-9*T^1+1.170891E-11*T^2-1.277613E-14*T^3+5.492523E-18*T^4}
    ThermalExpansion
      alphatan = CTE_solid_average_6(T[1/K])[1/K]
      dL = (dL_solid_average_6(T[1/K])-dL_solid_average_6(Tempref[1/K]))/(1+dL_solid_average_6(Tempref[1/K]))
      alphatanIso = CTE_solid_average_6(T[1/K])[1/K]
      dLIso = (dL_solid_average_6(T[1/K])-dL_solid_average_6(Tempref[1/K]))/(1+dL_solid_average_6(Tempref[1/K]))
      dL_solid_average_6: Piecewise | arg = T; pieces = {80.0, 1000.0, 9.268893E-5-1.660241E-6*T^1+7.066611E-9*T^2-1.04759E-11*T^3+7.49591E-15*T^4-2.147228E-18*T^5}
      CTE_solid_average_6: Piecewise | arg = T; pieces = {80.0, 1000.0, -1.660241E-6+1.413322E-8*T^1-3.14277E-11*T^2+2.998364E-14*T^3-1.073614E-17*T^4}
    Enu "Young's modulus and Poisson's ratio"
      youngsmodulus = E(T[1/K])[Pa]
      poissonsratio = nu(T[1/K])
      E: Piecewise
        arg = T
        pieces = 
          {2.0, 170.0, 7.19219E10-7.955576E7*T^1+1200039.0*T^2-7440.215*T^3+21.72957*T^4-0.02394189*T^5}
          {170.0, 1700.0, 6.906825E10+1.167539E7*T^1+11447.54*T^2-25.91953*T^3+0.01545627*T^4-3.022226E-6*T^5}
      nu: Piecewise
        arg = T
        pieces = 
          {2.0, 170.0, 0.1623859-3.46611E-4*T^1+5.42002E-6*T^2-2.78502E-8*T^3+4.878708E-11*T^4}
          {170.0, 950.0, 0.1442531+2.285363E-4*T^1-9.253567E-7*T^2+1.832686E-9*T^3-1.635196E-12*T^4+5.369587E-16*T^5}
          {950.0, 1700.0, 0.04194888+4.230553E-4*T^1-4.739473E-7*T^2+2.308844E-10*T^3-4.040605E-14*T^4}
    KG "Bulk modulus and shear modulus"
      K = kappa(T[1/K])[Pa]
      G = mu(T[1/K])[Pa]
      mu: Piecewise
        arg = T
        pieces = 
          {2.0, 170.0, 3.093791E10-2.513966E7*T^1+372325.4*T^2-2429.327*T^3+7.746996*T^4-0.009450154*T^5}
          {170.0, 450.0, 3.087221E10-6676611.0*T^1+36600.0*T^2-35.83581*T^3}
          {450.0, 1700.0, 2.914548E10+9388166.0*T^1-8173.552*T^2+3.504887*T^3-5.616985E-4*T^4}
      kappa: Piecewise
        arg = T
        pieces = 
          {2.0, 170.0, 3.548804E10-7.249187E7*T^1+1081126.0*T^2-5664.153*T^3+10.51074*T^4}
          {170.0, 950.0, 3.234657E10+2.830576E7*T^1-87346.28*T^2+175.3606*T^3-0.1614875*T^4+5.404807E-5*T^5}
          {950.0, 1700.0, 1.341176E10+8.005859E7*T^1-86531.61*T^2+41.37606*T^3-0.007122425*T^4}
  mat3: Common "Air" on domains 2
    def "Basic"
      thermalexpansioncoefficient = alpha_p(pA,T)
      molarmass = 0.02897[kg/mol]
      bulkviscosity = muB(T)
      relpermeability = 1
      relpermittivity = 1
      dynamicviscosity = eta(T)
      ratioofspecificheat = 1.4
      electricconductivity = 0[S/m]
      heatcapacity = Cp(T)
      density = rho(pA,T)
      thermalconductivity = k(T)
      soundspeed = cs(T)
      eta: Piecewise | arg = T; pieces = {200.0, 1600.0, -8.38278E-7+8.35717342E-8*T^1-7.69429583E-11*T^2+4.6437266E-14*T^3-1.06585607E-17*T^4}; argunit = K; fununit = Pa*s
      Cp: Piecewise | arg = T; pieces = {200.0, 1600.0, 1047.63657-0.372589265*T^1+9.45304214E-4*T^2-6.02409443E-7*T^3+1.2858961E-10*T^4}; argunit = K; fununit = J/(kg*K)
      rho: Analytic | expr = pA*0.02897/R_const[K*mol/J]/T; args = {pA, T}; dermethod = manual; argders = {{pA, d(pA*0.02897/R_const/T,pA)}, {T, d(pA*0.02897/R_const/T,T)}}; argunit = Pa,K; fununit = kg/m^3
      k: Piecewise | arg = T; pieces = {200.0, 1600.0, -0.00227583562+1.15480022E-4*T^1-7.90252856E-8*T^2+4.11702505E-11*T^3-7.43864331E-15*T^4}; argunit = K; fununit = W/(m*K)
      cs: Analytic | expr = sqrt(1.4*R_const[K*mol/J]/0.02897*T); args = T; dermethod = manual; argunit = K; fununit = m/s
      an1: Analytic | funcname = alpha_p; expr = -1/rho(pA,T)*d(rho(pA,T),T); args = {pA, T}; argunit = Pa,K; fununit = 1/K
      an2: Analytic "Analytic 2a" | funcname = muB; expr = 0.6*eta(T); args = T; argunit = K; fununit = Pa*s
    RefractiveIndex
      n = 1
      ki = 0
    NonlinearModel
      BA = (def.gamma+1)/2

Physics
  acpr: PressureAcoustics "Pressure Acoustics, Frequency Domain" on domains 2
    dependent variable p
    EquationForm.form = Frequency
    EquationSettings.delta = 1
    ReferencePressure.ReferenceType = ReferencePressureAir
    fpam1: FrequencyPressureAcousticsModel "Pressure Acoustics 1" (default)
      FluidModel = FrequencyLinearElastic
      rho_mat = from_mat
      c_mat = from_mat
      minput_temperature_src = fromCommonDef
      minput_pressure_src = fromCommonDef
      minput_strainreferencetemperature_src = fromCommonDef
    shb1: SoundHard "Sound Hard Boundary (Wall) 1" (default)
    init1: init "Initial Values 1" (default) | p = 1[bar]
    pr1: Pressure on boundaries 11, 19 | p0 = 1[bar]
  solid: SolidMechanics on domains 1
    dependent variable u = {u, v, w}
    lemm1: LinearElasticModel "Linear Elastic Material 1" (default)
      IsotropicOption = Enu
      E_mat = from_mat
      nu_mat = from_mat
      minput_pressure_src = fromCommonDef
    free1: Free (default)
    init1: init "Initial Values 1" (default)
    fix1: Fixed "Fixed Constraint 1" on boundaries 1-5, 26

Multiphysics
  asb1: AcousticStructureBoundary on all boundaries | Acoustics_physics = acpr; Structure_physics = solid

Mesh
  mesh1 "Mesh 1"
    size: MeshSizeDefault | hauto = 3
    swe1: Sweep "Swept 1" on domains 2 | facemethod = tri
    ftet1: FreeTet "Free Tetrahedral 1" on remaining entities

Studies
  std3 "Study 3"
    eig: Eigenfrequency | shift = 140[kHz]; eigwhich = lr

Solver configurations
  sol1 "Solution 1" (study std3)
    v1: Variables "Dependent Variables 1"
    e1: Eigenvalue "Eigenvalue Solver 1" | transform = eigenfrequency; shift = 140[kHz]; eigvfunscaleparam = 9.88E-9
      d1: Direct "Suggested Direct Solver (asb1) (merged)"

Datasets
  dset1: Solution | solution = sol1

Evaluation groups
  std3EvgFrq: EvaluationGroup "Eigenfrequencies (Study 3)" | data = dset1
    gev1: EvalGlobal "Global Evaluation 1"
      expr = {freq*2*pi, imag(freq)/abs(freq), abs(freq)/imag(freq)/2}
      unit = {rad/s, 1, 1}
      descr = {Angular frequency, Damping ratio, Quality factor}

Plots
  pg1: PlotGroup3D "Acoustic Pressure (acpr)" | data = dset1
    surf1: Surface | expr = acpr.p_t
  pg2: PlotGroup3D "Sound Pressure Level (acpr)" | data = dset1
    surf1: Surface | expr = acpr.Lp
  pg3: PlotGroup3D "Acoustic Pressure, Isosurfaces (acpr)" | data = dset1
    iso1: Isosurface | expr = acpr.p_t
  pg4: PlotGroup3D "Mode Shape (solid)" | data = dset1
    surf1: Surface | expr = solid.disp
      def: Deform "Deformation" | expr = {u, v, w}; descr = Displacement field

Exports
  img1: Image | size = current; unit = px; width = 874; height = 656